// SBML level 3 version 1

model __main()

  // Compartments:
  compartment default_compartment = 1;

  // Species:
  species A in default_compartment = 0;
  species cat in default_compartment = 0;
  species cat1 in default_compartment = 0;
  species B in default_compartment = 0;
  species P in default_compartment = 0;
  species catI in default_compartment = 0;

  // Parameters:
  k1 = 49941;
  kN1 = 79097;
  k2 = 74286;
  kN2 = 16290;
  k3 = 31655;
  kN3 = 49340;

  // Reactions:
  J1: A + cat -> cat1; k1*A*cat - kN1*cat1;
  J2: B + cat1 -> P + cat; k2*B*cat1 - kN2*P*cat;
  J3: A + cat -> catI; k3*A*cat - kN3*catI;
end
